// COMSOL Multiphysics 4.3 (Build: 233) model "water hammer-CO.mph"
// Outline of the model tree

Parameters
  L = 2[m]  // lenght
  z0 = 1.5[m]  // measurement point
  R = 14.3[mm]  // pipe inner radius
  w = 0.7[mm]  // pipe wall thickness
  E = 128000[N/mm^2]  // pipe youngs modulus
  Q0 = 0.0005[m^3/s]  // initial flow rate
  u0 = Q0/(R^2*pi)  // initial velocity
  p0 = 4[atm]  // initial pressure
  dt = 0.2*L/N/1020[m/s]  // Time step according to CFL
  N = 400  // Number of mesh points
  CU = 15000000[psi]  // TEMP
  PEX = 1150[N/mm^2]

Geometry
  geom1 "Geometry 1" (3D, length unit m)
    pol1: Polygon | x = 0 z0 L; y = {0, 0, 0}; z = {0, 0, 0}
    fin: Finalize "Form Union"

Materials
  mat1 "Water, liquid" on all edges
    def "Basic"
      dynamicviscosity = eta(T[1/K])[Pa*s]
      ratioofspecificheat = 1.0
      electricconductivity = 5.5e-6[S/m]
      heatcapacity = Cp(T[1/K])[J/(kg*K)]
      density = rho(T[1/K])[kg/m^3]
      thermalconductivity = k(T[1/K])[W/(m*K)]
      soundspeed = cs(T[1/K])[m/s]
      eta: Piecewise
        arg = T
        extrap = constant
        pieces = 
          {273.15, 413.15, 1.3799566804-0.021224019151*T^1+1.3604562827E-4*T^2-4.6454090319E-7*T^3+8.9042735735E-10*T^4-9.0790692686E-13*T^5+3.8457331488E-16*T^6}
          {413.15, 553.75, 0.00401235783-2.10746715E-5*T^1+3.85772275E-8*T^2-2.39730284E-11*T^3}
      Cp: Piecewise | arg = T; extrap = constant; pieces = {273.15, 553.75, 12010.1471-80.4072879*T^1+0.309866854*T^2-5.38186884E-4*T^3+3.62536437E-7*T^4}
      rho: Piecewise | arg = T; extrap = constant; pieces = {273.15, 553.75, 838.466135+1.40050603*T^1-0.0030112376*T^2+3.71822313E-7*T^3}
      k: Piecewise | arg = T; extrap = constant; pieces = {273.15, 553.75, -0.869083936+0.00894880345*T^1-1.58366345E-5*T^2+7.97543259E-9*T^3}
      cs: Interpolation | table = {{273, 1403}, {278, 1427}, {283, 1447}, {293, 1481}, {303, 1507}, {313, 1526}, {323, 1541}, {333, 1552}, {343, 1555}, {353, 1555}, {363, 1550}, {373, 1543}}; interp = piecewisecubic; extrap = const

Physics
  whtd: WaterHammer on all edges
    dependent variable p
    fp1: FluidProperties (default)
    pipe1: PipeProperties (default)
      Echoice = UserDefined
      E = E
      dwChoice = UserDefined
      dw = w
      frictionmodel = 100
      shape = Round
      innerd = 2*R
    closed1: Closed (default)
    init1: init "Initial Values 1" (default) | p = p0; u = u0
    pres1: Pressure on points 1 | p = p0

Mesh
  mesh1 "Mesh 1"
    size: MeshSizeDefault | hmax = L/N; hmin = 1[mm]; hauto = 5; custom = on
    edg1: Edge on all edges

Studies
  std1 "Study 1"
    time: Transient "Time Dependent" | tlist = range(0,0.01,1.5)

Solver configurations
  sol1 "Solver 1" (study std1)
    v1: Variables "Dependent Variables 1"
    t1: Time "Time-Dependent Solver 1"
      tlist = range(0,0.01,1.5)
      rtol = 0.01
      atolglobalmethod = scaled
      atolglobal = 0.0010
      timemethod = genalpha
      maxorder = 5
      minorder = 1
      rhoinf = 0.75
      dDef: Direct
      fc1: FullyCoupled

Datasets
  dset1: Solution | solution = sol1
  cln1: CutLine3D | data = dset1; genpoints = {{0, 0, 0}, {1, 0, 0}}

Plots
  pg1: PlotGroup3D "Pressure" | data = dset1
    line1: Line | readytoplot = on; expr = p; unit = Pa; linetype = tube; radiusexpr = 0.5*whtd.dh
  pg2: PlotGroup3D "Velocity" | data = dset1
    arwl1: ArrowLine
      readytoplot = on
      expr = {whtd.vx, whtd.vy, whtd.vz}
      unit = {m/s, m/s, m/s}
      arrowlength = normalized
      arrowcount = 20
      col1: Color "Color Expression 1" | expr = abs(u)
  pg3: PlotGroup1D "Measurment Point"
    data = dset1
    phaseintitle = on
    prefixintitle = pressure @virtual sensor
    suffixintitle = 1.5 m from Riser
    lngr1: LineGraph on all edges | listen = on; expr = p-p0; unit = bar; xdata = expr; xdataexpr = t
  pg4: PlotGroup1D "pressure graph" | data = dset1
    lngr1: LineGraph on edges 1, 2
      expr = p-p0
      unit = bar
      typeintitle = off
      descriptionintitle = on
      expressionintitle = off
      prefixintitle = pressure surge wave
      xdata = arc